<?xml version="1.0" encoding="UTF-8"?>

<channelml xmlns="http://morphml.org/channelml/schema"
    xmlns:xsi="http://www.w3.org/2001/XMLSchema-instance"
    xmlns:meta="http://morphml.org/metadata/schema"
    xsi:schemaLocation="http://morphml.org/channelml/schema  http://www.neuroml.org/NeuroMLValidator/NeuroMLFiles/Schemata/v1.7.1/Level2/ChannelML_v1.7.1.xsd"
    units="Physiological Units">

    <meta:notes>ChannelML file describing a single synaptic mechanism</meta:notes>

    <synapse_type name="SingleExpSyn">

        <status value="stable"/>

        <meta:notes>Simple example of a synaptic mechanism, which consists of a postsynaptic conductance which
        jumps to max_conductance on activation and decays as an exponential function of time with time constant decay_time.
         Mappings exist for NEURON and GENESIS.</meta:notes>

        <meta:authorList>
            <meta:modelTranslator>
                <meta:name>Padraig Gleeson</meta:name>
                <meta:institution>UCL</meta:institution>
                <meta:email>p.gleeson - at - ucl.ac.uk</meta:email>
            </meta:modelTranslator>
        </meta:authorList>

        <meta:neuronDBref>
            <meta:modelName>Receptor properties</meta:modelName>
            <meta:uri>http://senselab.med.yale.edu/senselab/NeuronDB/receptors2.asp</meta:uri>
        </meta:neuronDBref>

        <doub_exp_syn max_conductance="1.0E-5" rise_time="0" decay_time="2" reversal_potential="0"/>

    </synapse_type>

</channelml>
