<?xml version="1.0" encoding="UTF-8"?>
<networkml xmlns="http://morphml.org/networkml/schema"
    xmlns:meta="http://morphml.org/metadata/schema"
    xmlns:xsi="http://www.w3.org/2001/XMLSchema-instance"
    xsi:schemaLocation="http://morphml.org/networkml/schema  http://www.neuroml.org/NeuroMLValidator/NeuroMLFiles/Schemata/v1.8.1/Level3/NetworkML_v1.8.1.xsd"
    length_units="micrometer">

    <meta:notes>A NetworkML file with 50 instances of cell in a spiral pattern, and 49 connections</meta:notes>

        <populations>
        <population name="SampleCellGroup" cell_type="SampleCell">
            <instances size="50">
                <instance id="0">
                    <location x="0.0" y="0" z="100.0"/>
                </instance>
                <instance id="1">
                    <location x="49.48079185090459" y="2" z="96.89124217106448"/>
                </instance>
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            </instances>
        </population>
    </populations>
    <projections units="Physiological Units">
        <projection name="NetConn_1" source="SampleCellGroup" target="SampleCellGroup">
            <synapse_props synapse_type="DoubExpSyn" internal_delay="5" weight="1" threshold="-20"/>
            <connections>
                <connection id="0" pre_cell_id="0" post_cell_id="1"/>
                <connection id="1" pre_cell_id="1" post_cell_id="2"/>
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            </connections>
        </projection>
    </projections>
</networkml>
